# /* S-Curve
#
# S: Saturation Maximum Feasible Market Penetration
# Yg Start of Growth Stage = Time to get into the critical mass of 10 %
# Tm: Take Over Time = Time to get into the red zone of maturity or 90 %
T_mat := 9
Y_d := 5
C(t) := (1 - 1*1/(1 + 81^((T_mat + Y_d/2 - t)/Y_d)))
12 + □
S := 1
Y_g := 5
T_m := 9
Y_s := 9 + 5 + 12
S(t) := 1/(1 + 81^((Y_g + T_m/2 - t)/T_m))
T(t) := if(t < 15, S(t), C(t - 15))
T(24 + 5) = 0.1
t := 0, 1 .. 60
T(15 + T_m) = 0.9
S(Y_s) = 0.999683
T(15 + T_m + Y_g) = 0.1
t := 0, 1 .. 36
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T(25) = 0.788905
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C(0) = 0.999959
C(1) = 0.999902
C(T_mat) = 0.9
T(14) = 0.9
T(28) = 0.211095
C(T_mat + Y_d) = 0.1
T(35) = 0.000569283
T(40) = 7.03214e-6
# Elasticity Of Rnd
Rnd(t) := 10^1*ln(81)*81^((-t + T_m/2 + Y_g)/T_m)/(T_m*(81^((-t + T_m/2 + Y_g)/T_m) + 1)^2) + 0.25
ln(81) = 4.39445
t := 0, 1 .. 36
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Er(t) := Rnd(t)^-1/2
Er(36) = 1.99991
Er(3) = 1.14094
Er(7) = 0.450877
Er(15) = 0.922866
